# OpenSim document version 30000
Model HYOID_Subject_01:
  length_units: meters
  force_units: N
  gravity: 0 -9.80665 0
  credits:
    Jonathan Mortensen, University of Utah, Department of Mechanical Engineering
  publications:
    The inclusion of hyoid muscles improve moment generating capacity and dynamic simulations in musculoskeletal models of the head and neck, PLOS ONE, 2018
  BodySet:
    Body ground: mass=0 mass_center=(0 0 0) inertia_xx=0 inertia_yy=0 inertia_zz=0
    Body spine: mass=63.3654 mass_center=(0 0 0) inertia_xx=0.895674 inertia_yy=0.895674 inertia_zz=0.895674
        meshes=tlspine.vtp
      CustomJoint spine: parent_body=ground location_in_parent=(0 0 0) location=(0 0 0)
        Coordinate gndpitch: motion_type=rotational default_value=-5.751651e-12 range=(-3.141593 3.141593) clamped=true
        Coordinate gndroll: motion_type=rotational default_value=1.385887e-11 range=(-3.141593 3.141593) clamped=true
        Coordinate gndyaw: motion_type=rotational default_value=7.902415e-12 range=(-3.141593 3.141593) clamped=true
        Coordinate spine_tx: motion_type=translational default_value=-3.978722e-17 range=(-1 1) clamped=true
        Coordinate spine_ty: motion_type=translational default_value=8.445262e-17 range=(-1 1) clamped=true
        Coordinate spine_tz: motion_type=translational default_value=-7.306666e-19 range=(-1 1) clamped=true
        SpatialTransform:
          TransformAxis rotation1: coordinates=gndpitch axis=(0 0 1) LinearFunction(coefficients=1 0)
          TransformAxis rotation2: coordinates=gndroll axis=(1 0 0) LinearFunction(coefficients=1 0)
          TransformAxis rotation3: coordinates=gndyaw axis=(0 1 0) LinearFunction(coefficients=1 0)
          TransformAxis translation1: coordinates=spine_tx axis=(1 0 0) LinearFunction(coefficients=1 0)
          TransformAxis translation2: coordinates=spine_ty axis=(0 1 0) LinearFunction(coefficients=1 0)
          TransformAxis translation3: coordinates=spine_tz axis=(0 0 1) LinearFunction(coefficients=1 0)
    Body rscapula: mass=0.9052201 mass_center=(0 0 0) inertia_xx=0.895674 inertia_yy=0.895674 inertia_zz=0.447837
        meshes=rscapula.vtp
      WeldJoint rscapulajnt: parent_body=spine location_in_parent=(-0.03640651 0.3603846 0.1827288)
          orientation_in_parent=(0.1745329 -0.296706 -0.1745329) location=(0 0 0)
    Body rclavicle: mass=0.9052201 mass_center=(0 0 0) inertia_xx=0.895674 inertia_yy=0.895674 inertia_zz=0.447837
        meshes=rclavicle.vtp
      WeldJoint rclaviclejnt: parent_body=spine location_in_parent=(-0.01173762 0.3335274 0.02188369)
          orientation_in_parent=(0 0.1396263 0) location=(0 0 0)
    Body lscapula: mass=0.9052201 mass_center=(0 0 0) inertia_xx=0.895674 inertia_yy=0.895674 inertia_zz=0.447837
        meshes=lscapula.vtp
      WeldJoint lscapulajnt: parent_body=spine location_in_parent=(-0.03640651 0.3603846 -0.1827288)
          orientation_in_parent=(-0.1745329 0.296706 -0.1745329) location=(0 0 0)
    Body lclavicle: mass=0.9052201 mass_center=(0 0 0) inertia_xx=0.895674 inertia_yy=0.895674 inertia_zz=0.447837
        meshes=lclavicle.vtp
      WeldJoint lclaviclejnt: parent_body=spine location_in_parent=(-0.01173762 0.3335274 -0.02188369)
          orientation_in_parent=(0 -0.1396263 0) location=(0 0 0)
    Body ribcage: mass=0.9052201 mass_center=(0 0 0) inertia_xx=0.895674 inertia_yy=0.895674 inertia_zz=0.6717555
        meshes=ribcage.vtp
      WeldJoint ribcagejnt: parent_body=spine location_in_parent=(0 0 0) location=(0 0 0)
    Body cerv7: mass=0.5287252 mass_center=(-0.000223647 0.00793946 0) inertia_xx=0.02263858 inertia_yy=0.09055434
        inertia_zz=0.02263858 meshes=rotatedcerv7.vtp
      CustomJoint auxt1jnt: parent_body=spine location_in_parent=(-0.04724888 0.3593899 0)
          location=(0.007648718 -0.006323611 0)
        Coordinate pitch2: motion_type=rotational default_value=1.190973e-6 range=(-0.5759587 0.837758) clamped=true
        Coordinate roll2: motion_type=rotational default_value=-7.417425e-34 range=(-0.5759587 0.5759587) clamped=true
        Coordinate yaw2: motion_type=rotational default_value=-1.940732e-33 range=(-0.4712389 0.4712389) clamped=true
        SpatialTransform: axes_held_at_zero=(translation1 translation2 translation3)
          TransformAxis rotation1: coordinates=pitch2 axis=(0 0 1)
            SimmSpline: x=(-1.74533 1.74533) y=(-0.172788 0.172788)
          TransformAxis rotation2: coordinates=roll2 axis=(1 0 0)
            SimmSpline: x=(-1.74533 1.74533) y=(-0.136136 0.136136)
          TransformAxis rotation3: coordinates=yaw2 axis=(0 1 0)
            SimmSpline: x=(-1.74533 1.74533) y=(-0.109956 0.109956)
    Body cerv6: mass=0.4596244 mass_center=(0.000223647 0.0071567 0) inertia_xx=0.02263858 inertia_yy=0.09055434
        inertia_zz=0.02263858 meshes=cerv6.vtp
      CustomJoint aux7jnt: parent_body=cerv7 location_in_parent=(0.0148233 0.01384373 0)
          location=(0.01053264 -0.00454562 0)
        Coordinate aux7jnt_r3: motion_type=rotational default_value=2.066836e-7 range=(-99999.9 99999.9) clamped=false
        Coordinate aux7jnt_r1: motion_type=rotational default_value=0 range=(-99999.9 99999.9) clamped=false
        Coordinate aux7jnt_r2: motion_type=rotational default_value=0 range=(-99999.9 99999.9) clamped=false
        SpatialTransform: axes_held_at_zero=(translation1 translation2 translation3)
          TransformAxis rotation1: coordinates=aux7jnt_r3 axis=(0 0 1) LinearFunction(coefficients=1 0)
          TransformAxis rotation2: coordinates=aux7jnt_r1 axis=(1 0 0) LinearFunction(coefficients=1 0)
          TransformAxis rotation3: coordinates=aux7jnt_r2 axis=(0 1 0) LinearFunction(coefficients=1 0)
    Body cerv5: mass=0.3884299 mass_center=(0.000111823 0.00704487 0) inertia_xx=0.02263858 inertia_yy=0.09055434
        inertia_zz=0.02263858 meshes=cerv5.vtp
      CustomJoint aux6jnt: parent_body=cerv6 location_in_parent=(0.0110146 0.01090278 0)
          location=(0.006340385 -0.009113604 0)
        Coordinate aux6jnt_r3: motion_type=rotational default_value=2.431566e-7 range=(-99999.9 99999.9) clamped=false
        Coordinate aux6jnt_r1: motion_type=rotational default_value=0 range=(-99999.9 99999.9) clamped=false
        Coordinate aux6jnt_r2: motion_type=rotational default_value=0 range=(-99999.9 99999.9) clamped=false
        SpatialTransform: axes_held_at_zero=(translation1 translation2 translation3)
          TransformAxis rotation1: coordinates=aux6jnt_r3 axis=(0 0 1) LinearFunction(coefficients=1 0)
          TransformAxis rotation2: coordinates=aux6jnt_r1 axis=(1 0 0) LinearFunction(coefficients=1 0)
          TransformAxis rotation3: coordinates=aux6jnt_r2 axis=(0 1 0) LinearFunction(coefficients=1 0)
    Body cerv4: mass=0.3831949 mass_center=(-0.00033547 0.00749217 0) inertia_xx=0.02263858 inertia_yy=0.09055434
        inertia_zz=0.02263858 meshes=cerv4.vtp
      CustomJoint aux5jnt: parent_body=cerv5 location_in_parent=(0.009426709 0.008330841 0)
          location=(0.005613533 -0.0131057 0)
        Coordinate aux5jnt_r3: motion_type=rotational default_value=2.431566e-7 range=(-99999.9 99999.9) clamped=false
        Coordinate aux5jnt_r1: motion_type=rotational default_value=0 range=(-99999.9 99999.9) clamped=false
        Coordinate aux5jnt_r2: motion_type=rotational default_value=0 range=(-99999.9 99999.9) clamped=false
        SpatialTransform: axes_held_at_zero=(translation1 translation2 translation3)
          TransformAxis rotation1: coordinates=aux5jnt_r3 axis=(0 0 1) LinearFunction(coefficients=1 0)
          TransformAxis rotation2: coordinates=aux5jnt_r1 axis=(1 0 0) LinearFunction(coefficients=1 0)
          TransformAxis rotation3: coordinates=aux5jnt_r2 axis=(0 1 0) LinearFunction(coefficients=1 0)
    Body cerv3: mass=0.3800539 mass_center=(-0.000894587 0.00793946 0) inertia_xx=0.02263858 inertia_yy=0.09055434
        inertia_zz=0.02263858 meshes=cerv3.vtp
      CustomJoint aux4jnt: parent_body=cerv4 location_in_parent=(0.00818547 0.007134331 0)
          location=(0.00526688 -0.01008647 0)
        Coordinate aux4jnt_r3: motion_type=rotational default_value=1.823674e-7 range=(-99999.9 99999.9) clamped=false
        Coordinate aux4jnt_r1: motion_type=rotational default_value=0 range=(-99999.9 99999.9) clamped=false
        Coordinate aux4jnt_r2: motion_type=rotational default_value=0 range=(-99999.9 99999.9) clamped=false
        SpatialTransform: axes_held_at_zero=(translation1 translation2 translation3)
          TransformAxis rotation1: coordinates=aux4jnt_r3 axis=(0 0 1) LinearFunction(coefficients=1 0)
          TransformAxis rotation2: coordinates=aux4jnt_r1 axis=(1 0 0) LinearFunction(coefficients=1 0)
          TransformAxis rotation3: coordinates=aux4jnt_r2 axis=(0 1 0) LinearFunction(coefficients=1 0)
    Body hyoid: mass=0.009052201 mass_center=(0 0 0) inertia_xx=4.5261e-5 inertia_yy=4.5261e-5 inertia_zz=4.5261e-5
        meshes=cerv3.vtp
      CustomJoint HyoidJoint: parent_body=cerv3 location_in_parent=(0 0 0) location=(-0.047 0.013 0)
        Coordinate HyoidJoint_r3: motion_type=rotational default_value=0 range=(-3.14 3.14) clamped=false
        Coordinate HyoidJoint_r1: motion_type=rotational default_value=0 range=(-3.14 3.14) clamped=false
        Coordinate HyoidJoint_r2: motion_type=rotational default_value=0 range=(-3.14 3.14) clamped=false
        SpatialTransform: axes_held_at_zero=(translation1 translation2 translation3)
          TransformAxis rotation1: coordinates=HyoidJoint_r3 axis=(0 0 1) LinearFunction(coefficients=1 0)
          TransformAxis rotation2: coordinates=HyoidJoint_r1 axis=(1 0 0) LinearFunction(coefficients=1 0)
          TransformAxis rotation3: coordinates=HyoidJoint_r2 axis=(0 1 0) LinearFunction(coefficients=1 0)
    Body cerv2: mass=0.5318661 mass_center=(-0.00111823 0.00659758 0) inertia_xx=0.02263858 inertia_yy=0.09055434
        inertia_zz=0.02263858 meshes=cerv2.vtp
      CustomJoint aux3jnt: parent_body=cerv3 location_in_parent=(0.005870727 0.005658262 0)
          location=(0.006072009 -0.01255776 0)
        Coordinate aux3jnt_r3: motion_type=rotational default_value=1.215783e-7 range=(-99999.9 99999.9) clamped=false
        Coordinate aux3jnt_r1: motion_type=rotational default_value=0 range=(-99999.9 99999.9) clamped=false
        Coordinate aux3jnt_r2: motion_type=rotational default_value=0 range=(-99999.9 99999.9) clamped=false
        SpatialTransform: axes_held_at_zero=(translation1 translation2 translation3)
          TransformAxis rotation1: coordinates=aux3jnt_r3 axis=(0 0 1) LinearFunction(coefficients=1 0)
          TransformAxis rotation2: coordinates=aux3jnt_r1 axis=(1 0 0) LinearFunction(coefficients=1 0)
          TransformAxis rotation3: coordinates=aux3jnt_r2 axis=(0 1 0) LinearFunction(coefficients=1 0)
    Body cerv1: mass=0.4229801 mass_center=(0.0348889 0.00212464 0) inertia_xx=0.02263858 inertia_yy=0.09055434
        inertia_zz=0.02263858 meshes=cerv1.vtp
      CustomJoint aux2jnt: parent_body=cerv2 location_in_parent=(0.00770463 0.02379601 0)
          location=(0.04746902 0.003936182 0)
        Coordinate pitch1: motion_type=rotational default_value=1.572011e-6 range=(-0.2792527 0.418879) clamped=true
        Coordinate roll1: motion_type=rotational default_value=-1.889405e-33 range=(-0.1047198 0.1047198) clamped=true
        Coordinate yaw1: motion_type=rotational default_value=1.274842e-34 range=(-0.6632251 0.6632251) clamped=true
        SpatialTransform: axes_held_at_zero=(translation1 translation2 translation3)
          TransformAxis rotation1: coordinates=pitch1 axis=(0 0 1)
            SimmSpline: x=(-1.74533 1.74533) y=(-0.774926 0.774926)
          TransformAxis rotation2: coordinates=roll1 axis=(1 0 0)
            SimmSpline: x=(-1.74533 1.74533) y=(-0.872665 0.872665)
          TransformAxis rotation3: coordinates=yaw1 axis=(0 1 0)
            SimmSpline: x=(-1.74533 1.74533) y=(-1.5516 1.5516)
    Body skull: mass=3.439836 mass_center=(0 0.0721954 0) inertia_xx=0.02720554 inertia_yy=0.008362418
        inertia_zz=0.02933885 meshes=skull.vtp
      CustomJoint aux1jnt: parent_body=cerv1 location_in_parent=(0.04847543 0.01668405 0) location=(0 0 0)
        Coordinate aux1jnt_r3: motion_type=rotational default_value=8.424689e-7 range=(-99999.9 99999.9) clamped=false
        Coordinate aux1jnt_r1: motion_type=rotational default_value=0 range=(-99999.9 99999.9) clamped=false
        Coordinate aux1jnt_r2: motion_type=rotational default_value=0 range=(-99999.9 99999.9) clamped=false
        SpatialTransform: axes_held_at_zero=(translation1 translation2 translation3)
          TransformAxis rotation1: coordinates=aux1jnt_r3 axis=(0 0 1) LinearFunction(coefficients=1 0)
          TransformAxis rotation2: coordinates=aux1jnt_r1 axis=(1 0 0) LinearFunction(coefficients=1 0)
          TransformAxis rotation3: coordinates=aux1jnt_r2 axis=(0 1 0) LinearFunction(coefficients=1 0)
    Body jaw: mass=0.181044 mass_center=(0 0.053399 0) inertia_xx=0.04129905 inertia_yy=0.02064953
        inertia_zz=0.04129905 meshes=jaw.vtp
      WeldJoint jawjnt: parent_body=skull location_in_parent=(0 0 0) location=(0 0 0)
  ConstraintSet:
    CoordinateCouplerConstraint aux7jnt_r1_con: independent_coordinate_names=roll2 dependent_coordinate_name=aux7jnt_r1
      coupled_coordinates_function: SimmSpline: x=(-1.74533 1.74533) y=(-0.23911 0.23911)
    CoordinateCouplerConstraint aux7jnt_r2_con: independent_coordinate_names=yaw2 dependent_coordinate_name=aux7jnt_r2
      coupled_coordinates_function: SimmSpline: x=(-1.74533 1.74533) y=(-0.328122 0.328122)
    CoordinateCouplerConstraint aux7jnt_r3_con: independent_coordinate_names=pitch2
        dependent_coordinate_name=aux7jnt_r3
      coupled_coordinates_function: SimmSpline: x=(-1.74533 1.74533) y=(-0.326377 0.326377)
    CoordinateCouplerConstraint aux6jnt_r1_con: independent_coordinate_names=roll2 dependent_coordinate_name=aux6jnt_r1
      coupled_coordinates_function: SimmSpline: x=(-1.74533 1.74533) y=(-0.274017 0.274017)
    CoordinateCouplerConstraint aux6jnt_r2_con: independent_coordinate_names=yaw2 dependent_coordinate_name=aux6jnt_r2
      coupled_coordinates_function: SimmSpline: x=(-1.74533 1.74533) y=(-0.382227 0.382227)
    CoordinateCouplerConstraint aux6jnt_r3_con: independent_coordinate_names=pitch2
        dependent_coordinate_name=aux6jnt_r3
      coupled_coordinates_function: SimmSpline: x=(-1.74533 1.74533) y=(-0.383972 0.383972)
    CoordinateCouplerConstraint aux5jnt_r1_con: independent_coordinate_names=roll2 dependent_coordinate_name=aux5jnt_r1
      coupled_coordinates_function: SimmSpline: x=(-1.74533 1.74533) y=(-0.376991 0.376991)
    CoordinateCouplerConstraint aux5jnt_r2_con: independent_coordinate_names=yaw2 dependent_coordinate_name=aux5jnt_r2
      coupled_coordinates_function: SimmSpline: x=(-1.74533 1.74533) y=(-0.382227 0.382227)
    CoordinateCouplerConstraint aux5jnt_r3_con: independent_coordinate_names=pitch2
        dependent_coordinate_name=aux5jnt_r3
      coupled_coordinates_function: SimmSpline: x=(-1.74533 1.74533) y=(-0.383972 0.383972)
    CoordinateCouplerConstraint aux4jnt_r1_con: independent_coordinate_names=roll2 dependent_coordinate_name=aux4jnt_r1
      coupled_coordinates_function: SimmSpline: x=(-1.74533 1.74533) y=(-0.376991 0.376991)
    CoordinateCouplerConstraint aux4jnt_r2_con: independent_coordinate_names=yaw2 dependent_coordinate_name=aux4jnt_r2
      coupled_coordinates_function: SimmSpline: x=(-1.74533 1.74533) y=(-0.382227 0.382227)
    CoordinateCouplerConstraint aux4jnt_r3_con: independent_coordinate_names=pitch2
        dependent_coordinate_name=aux4jnt_r3
      coupled_coordinates_function: SimmSpline: x=(-1.74533 1.74533) y=(-0.287979 0.287979)
    CoordinateCouplerConstraint aux3jnt_r1_con: independent_coordinate_names=roll2 dependent_coordinate_name=aux3jnt_r1
      coupled_coordinates_function: SimmSpline: x=(-1.74533 1.74533) y=(-0.342085 0.342085)
    CoordinateCouplerConstraint aux3jnt_r2_con: independent_coordinate_names=yaw2 dependent_coordinate_name=aux3jnt_r2
      coupled_coordinates_function: SimmSpline: x=(-1.74533 1.74533) y=(-0.164061 0.164061)
    CoordinateCouplerConstraint aux3jnt_r3_con: independent_coordinate_names=pitch2
        dependent_coordinate_name=aux3jnt_r3
      coupled_coordinates_function: SimmSpline: x=(-1.74533 1.74533) y=(-0.191986 0.191986)
    CoordinateCouplerConstraint aux1jnt_r1_con: independent_coordinate_names=roll1 dependent_coordinate_name=aux1jnt_r1
      coupled_coordinates_function: SimmSpline: x=(-1.74533 1.74533) y=(-0.872665 0.872665)
    CoordinateCouplerConstraint aux1jnt_r2_con: independent_coordinate_names=yaw1 dependent_coordinate_name=aux1jnt_r2
      coupled_coordinates_function: SimmSpline: x=(-1.74533 1.74533) y=(-0.193732 0.193732)
    CoordinateCouplerConstraint aux1jnt_r3_con: independent_coordinate_names=pitch1
        dependent_coordinate_name=aux1jnt_r3
      coupled_coordinates_function: SimmSpline: x=(-1.74533 1.74533) y=(-0.970403 0.970403)
    CoordinateCouplerConstraint HyoidJoint_r1_con: independent_coordinate_names=roll1
        dependent_coordinate_name=HyoidJoint_r1
      coupled_coordinates_function: SimmSpline: x=(-1.74533 1.74533) y=(-1.74533 1.74533)
    CoordinateCouplerConstraint HYOIDJoint_r2_con: independent_coordinate_names=yaw1
        dependent_coordinate_name=HyoidJoint_r2
      coupled_coordinates_function: SimmSpline: x=(-1.74533 1.74533) y=(-1.74533 1.74533)
    CoordinateCouplerConstraint HyoidJoint_r3_con: independent_coordinate_names=pitch1
        dependent_coordinate_name=HyoidJoint_r3
      coupled_coordinates_function: SimmSpline: x=(-1.74533 1.74533) y=(-1.74533 1.74533)
  ForceSet:
    PointActuator Skull_Impact: isDisabled=true min_control=1 max_control=1 body=skull point=(0 0.2 0)
        direction=(0 0 -1) force_is_global=true optimal_force=150
    TorqueActuator Skull_Moment: min_control=1 max_control=1 bodyA=skull bodyB=ground torque_is_global=true
        axis=(0 1 0) optimal_force=20
    Millard2012EquilibriumMuscle [values shared by the 72 below unless stated]:
      ActiveForceLengthCurve: min_norm_active_fiber_length=0.4441 transition_norm_fiber_length=0.73
          max_norm_active_fiber_length=1.8123 shallow_ascending_slope=0.8616 minimum_value=0
      ForceVelocityCurve: concentric_slope_at_vmax=0 concentric_slope_near_vmax=0.25 isometric_slope=5
          eccentric_slope_at_vmax=0 eccentric_slope_near_vmax=0.15 max_eccentric_velocity_force_multiplier=1.4
          concentric_curviness=0.6 eccentric_curviness=0.9
      FiberForceLengthCurve
      TendonForceLengthCurve
    Millard2012EquilibriumMuscle digastric_post: isDisabled=true max_isometric_force=109.62
        optimal_fiber_length=0.02280179 tendon_slack_length=0.03796664 pennation_angle_at_optimal=0.2496 [radians]
        minimum_activation=0.01
      PathPoint digastric post-P1: skull (-0.00651468 0.00363113 0.0509426)
      PathPoint digastric post-P2: hyoid (-0.02379 0.01897 0.0287)
    Millard2012EquilibriumMuscle digastric_ant: isDisabled=true max_isometric_force=109.62 optimal_fiber_length=0.0142
        tendon_slack_length=0.005 pennation_angle_at_optimal=0 minimum_activation=0.01
      PathPoint digastric post-P1: ground (-0.00239293 0.42054 0.0173)
      PathPoint digastric post-P2: ground (-0.00315293 0.41234 0.0057)
    Millard2012EquilibriumMuscle Geniohyoid: max_isometric_force=81.48 optimal_fiber_length=0.03901451
        tendon_slack_length=0.006164975 pennation_angle_at_optimal=0 minimum_activation=0.01
      PathPoint digastric post-P1: hyoid (-0.0110102 -0.00674058 0.00509443)
      PathPoint digastric post-P2: skull (0.0737974 -0.071875 0.00170877)
    Millard2012EquilibriumMuscle Mylohyoid_Post: max_isometric_force=44.52 optimal_fiber_length=0.03121065
        tendon_slack_length=0.01550946 pennation_angle_at_optimal=0 minimum_activation=0.01
      PathPoint digastric post-P1: hyoid (-0.00748995 -0.00882997 0.0031)
      PathPoint digastric post-P2: skull (0.0441076 -0.0415444 0.0310782)
    Millard2012EquilibriumMuscle Mylohyoid_Ant: max_isometric_force=133.56 optimal_fiber_length=0.02269138
        tendon_slack_length=0.003108719 pennation_angle_at_optimal=0 default_fiber_length=0.1 minimum_activation=0.01
      PathPoint digastric post-P1: hyoid (0.01451 -0.00962995 -0.0031)
      PathPoint digastric post-P2: skull (0.061836 -0.0636516 0.0168741)
    Millard2012EquilibriumMuscle Stylohyoid_Lat: isDisabled=true max_isometric_force=18.41786
        optimal_fiber_length=0.01980087 tendon_slack_length=0.05390842 pennation_angle_at_optimal=0.082
        minimum_activation=0.01
      PathPoint digastric post-P1: skull (0.0120682 -0.000854384 0.040156)
      PathPoint digastric post-P2: hyoid (-0.0184019 -0.00263318 0.01544)
    Millard2012EquilibriumMuscle Stylohyoid_Med: isDisabled=true max_isometric_force=18.41786
        optimal_fiber_length=0.01994128 tendon_slack_length=0.04779826 pennation_angle_at_optimal=0.08203
        minimum_activation=0.01
      PathPoint digastric post-P1: skull (0.0126022 -0.00213596 0.040156)
      PathPoint digastric post-P2: hyoid (-0.0194739 0.00199622 0.0162521)
    Millard2012EquilibriumMuscle Sterno_hyoid: max_isometric_force=46.05333 optimal_fiber_length=0.08009873
        tendon_slack_length=0.03432803 pennation_angle_at_optimal=0 minimum_activation=0.01
      PathPoint stern_mast-P1: hyoid (0.01042 -0.01014 0.00629)
      PathPoint default: ribcage (-0.0139588 0.310868 0.0197351)
    Millard2012EquilibriumMuscle SternoThyroid: max_isometric_force=54.6 optimal_fiber_length=0.06796867
        tendon_slack_length=0.02912943 pennation_angle_at_optimal=0 minimum_activation=0.01
      PathPoint stern_mast-P1: hyoid (-0.0065799 -0.03016 0.0133)
      PathPoint default: ribcage (-0.0145656 0.304134 0.0152191)
    Millard2012EquilibriumMuscle Omo_hyoid: max_isometric_force=63 optimal_fiber_length=0.05110756
        tendon_slack_length=0.02190324 pennation_angle_at_optimal=0 minimum_activation=0.01
      PathPoint stern_mast-P1: hyoid (0.00512 -0.0009 0.0132)
      PathPoint default: ribcage (-0.0209218 0.36887 0.0375405)
    Millard2012EquilibriumMuscle digastric_post_L: isDisabled=true max_isometric_force=109.62
        optimal_fiber_length=0.02280179 tendon_slack_length=0.03796664 pennation_angle_at_optimal=0.2496
        minimum_activation=0.01
      PathPoint digastric post-P1: skull (-0.00651468 0.00363113 -0.0509426)
      PathPoint digastric post-P2: hyoid (-0.02379 0.01897 -0.0287)
    Millard2012EquilibriumMuscle digastric_ant_L: isDisabled=true max_isometric_force=109.62
        optimal_fiber_length=0.01638907 tendon_slack_length=0.005770799 pennation_angle_at_optimal=0
        minimum_activation=0.01
      PathPoint digastric post-P1: skull (0.0323598 -0.0686711 -0.018476)
      PathPoint digastric post-P2: hyoid (-0.00984995 -0.01053 -0.0057)
    Millard2012EquilibriumMuscle Geniohyoid_L: max_isometric_force=81.48 optimal_fiber_length=0.03896004
        tendon_slack_length=0.006156367 pennation_angle_at_optimal=0 minimum_activation=0.01
      PathPoint digastric post-P1: hyoid (-0.0112453 -0.00676588 -0.00630312)
      PathPoint digastric post-P2: skull (0.0737974 -0.071875 -0.00170877)
    Millard2012EquilibriumMuscle Mylohyoid_Post_L: max_isometric_force=44.52 optimal_fiber_length=0.03121065
        tendon_slack_length=0.01550946 pennation_angle_at_optimal=0 minimum_activation=0.01
      PathPoint digastric post-P1: hyoid (-0.00748995 -0.00882997 -0.0031)
      PathPoint digastric post-P2: skull (0.0441076 -0.0415444 -0.0310782)
    Millard2012EquilibriumMuscle Mylohyoid_Ant_L: max_isometric_force=133.56 optimal_fiber_length=0.02269138
        tendon_slack_length=0.003108719 pennation_angle_at_optimal=0 minimum_activation=0.01
      PathPoint digastric post-P1: hyoid (0.01451 -0.00962995 0.0031)
      PathPoint digastric post-P2: skull (0.061836 -0.0636516 -0.0168741)
    Millard2012EquilibriumMuscle Stylohyoid_Lat_L: isDisabled=true max_isometric_force=18.41786
        optimal_fiber_length=0.01981213 tendon_slack_length=0.05393908 pennation_angle_at_optimal=0.082
        minimum_activation=0.01
      PathPoint digastric post-P1: skull (0.0120682 -0.000854384 -0.040156)
      PathPoint digastric post-P2: hyoid (-0.0190578 -0.00270358 -0.0163531)
    Millard2012EquilibriumMuscle Stylohyoid_Med_L: isDisabled=true max_isometric_force=18.41786
        optimal_fiber_length=0.01995535 tendon_slack_length=0.047832 pennation_angle_at_optimal=0.08203
        minimum_activation=0.01
      PathPoint digastric post-P1: skull (0.0126022 -0.00213596 -0.040156)
      PathPoint digastric post-P2: hyoid (-0.0201628 0.00192232 -0.0171408)
    Millard2012EquilibriumMuscle Sterno_hyoid_L: max_isometric_force=46.05333 optimal_fiber_length=0.08009873
        tendon_slack_length=0.03432803 pennation_angle_at_optimal=0 minimum_activation=0.01
      PathPoint stern_mast-P1: hyoid (0.01042 -0.01014 -0.00629)
      PathPoint default: ribcage (-0.0139588 0.310868 -0.0197351)
    Millard2012EquilibriumMuscle SternoThyroid_L: max_isometric_force=54.6 optimal_fiber_length=0.06796867
        tendon_slack_length=0.02912943 pennation_angle_at_optimal=0 minimum_activation=0.01
      PathPoint stern_mast-P1: hyoid (-0.0065799 -0.03016 -0.0133)
      PathPoint default: ribcage (-0.0145656 0.304134 -0.0152191)
    Millard2012EquilibriumMuscle Omo_hyoid_L: max_isometric_force=63 optimal_fiber_length=0.05110756
        tendon_slack_length=0.02190324 pennation_angle_at_optimal=0 minimum_activation=0.01
      PathPoint stern_mast-P1: hyoid (0.00512 -0.0009 -0.0132)
      PathPoint default: ribcage (-0.0209218 0.36887 -0.0375405)
    Millard2012EquilibriumMuscle stern_mast: max_isometric_force=165.48 optimal_fiber_length=0.1170627
        tendon_slack_length=0.0608325 pennation_angle_at_optimal=0.2617994 minimum_activation=0.01
      PathPoint P1: ribcage (-0.000696299 0.325172 0.00954925)
      PathPoint P2: skull (-0.0054467 0.0074011 0.0686711)
    Millard2012EquilibriumMuscle stern_mast_L: max_isometric_force=165.48 optimal_fiber_length=0.1170627
        tendon_slack_length=0.0608325 pennation_angle_at_optimal=0.2617994 minimum_activation=0.01
      PathPoint P1: ribcage (-0.000696299 0.325172 -0.00954925)
      PathPoint P2: skull (-0.0054467 0.0074011 -0.0686711)
    Millard2012EquilibriumMuscle cleid_mast: max_isometric_force=82.74 optimal_fiber_length=0.1181321
        tendon_slack_length=0.03850012 pennation_angle_at_optimal=0.2617994 minimum_activation=0.01
      PathPoint P1: rclavicle (0.00385949 0.00539135 0.0350139)
      PathPoint P2: skull (-0.0054467 0.0074011 0.0686711)
    Millard2012EquilibriumMuscle cleid_mast_L: max_isometric_force=82.74 optimal_fiber_length=0.1181321
        tendon_slack_length=0.03850012 pennation_angle_at_optimal=0.2617994 minimum_activation=0.01
      PathPoint P1: lclavicle (0.00385949 0.00539135 -0.0350139)
      PathPoint P2: skull (-0.0054467 0.0074011 -0.0686711)
    Millard2012EquilibriumMuscle cleid_occ: max_isometric_force=82.74 optimal_fiber_length=0.1173181
        tendon_slack_length=0.0754605 pennation_angle_at_optimal=0.2617994 minimum_activation=0.01
      PathPoint P1: rclavicle (0.00385949 0.00539135 0.0350139)
      PathPoint P2: skull (-0.0373793 0.0245635 0.0709138)
    Millard2012EquilibriumMuscle cleid_occ_L: max_isometric_force=82.74 optimal_fiber_length=0.1173181
        tendon_slack_length=0.0754605 pennation_angle_at_optimal=0.2617994 minimum_activation=0.01
      PathPoint P1: lclavicle (0.00385949 0.00539135 -0.0350139)
      PathPoint P2: skull (-0.0373793 0.0245635 -0.0709138)
    Millard2012EquilibriumMuscle scalenus_ant: max_isometric_force=123.48 optimal_fiber_length=0.04465277
        tendon_slack_length=0.05679513 pennation_angle_at_optimal=0.1745329 minimum_activation=0.01
      PathPoint P1: ribcage (-0.0212769 0.330702 0.0526203)
      PathPoint P2: cerv4 (0.00797301 0.00883405 0.0259766)
    Millard2012EquilibriumMuscle scalenus_ant_L: max_isometric_force=123.48 optimal_fiber_length=0.04465277
        tendon_slack_length=0.05679513 pennation_angle_at_optimal=0.1745329 minimum_activation=0.01
      PathPoint P1: ribcage (-0.0212769 0.330702 -0.0526203)
      PathPoint P2: cerv4 (0.00797301 0.00883405 -0.0259766)
    Millard2012EquilibriumMuscle scalenus_med: max_isometric_force=100.94 optimal_fiber_length=0.0536795
        tendon_slack_length=0.06603437 pennation_angle_at_optimal=0.1745329 minimum_activation=0.01
      PathPoint P1: ribcage (-0.0338004 0.341515 0.0623685)
      PathPoint P2: cerv3 (-0.0100865 0.0109699 0.0236954)
    Millard2012EquilibriumMuscle scalenus_med_L: max_isometric_force=100.94 optimal_fiber_length=0.0536795
        tendon_slack_length=0.06603437 pennation_angle_at_optimal=0.1745329 minimum_activation=0.01
      PathPoint P1: ribcage (-0.0338004 0.341515 -0.0623685)
      PathPoint P2: cerv3 (-0.0100865 0.0109699 -0.0236954)
    Millard2012EquilibriumMuscle scalenus_post: max_isometric_force=76.93 optimal_fiber_length=0.06329399
        tendon_slack_length=0.07436533 pennation_angle_at_optimal=0.1745329 minimum_activation=0.01
      PathPoint P1: ribcage (-0.0361877 0.311047 0.105639)
      PathPoint P2: cerv5 (-0.00357835 0.015331 0.0287386)
    Millard2012EquilibriumMuscle scalenus_post_L: max_isometric_force=76.93 optimal_fiber_length=0.06329399
        tendon_slack_length=0.07436533 pennation_angle_at_optimal=0.1745329 minimum_activation=0.01
      PathPoint P1: ribcage (-0.0361877 0.311047 -0.105639)
      PathPoint P2: cerv5 (-0.00357835 0.015331 -0.0287386)
    Millard2012EquilibriumMuscle long_cap_sklc4: max_isometric_force=79.968 optimal_fiber_length=0.04218473
        tendon_slack_length=0.04584481 pennation_angle_at_optimal=0.08726646 minimum_activation=0.01
      PathPoint P1: cerv4 (0.00729088 0.0130162 0.0270613)
      PathPoint P2: cerv3 (0.0133853 0.011283 0.0212129)
      PathPoint P3: cerv2 (0.0192336 0.00927016 0.0165163)
      PathPoint P4: cerv1 (0.0650588 0.00345534 0.0129603)
      PathPoint P5: skull (0.0104662 0.017045 0.00384473)
    Millard2012EquilibriumMuscle long_cap_sklc4_L: max_isometric_force=79.968 optimal_fiber_length=0.04218473
        tendon_slack_length=0.04584481 pennation_angle_at_optimal=0.08726646 minimum_activation=0.01
      PathPoint P1: cerv4 (0.00729088 0.0130162 -0.0270613)
      PathPoint P2: cerv3 (0.0133853 0.011283 -0.0212129)
      PathPoint P3: cerv2 (0.0192336 0.00927016 -0.0165163)
      PathPoint P4: cerv1 (0.0650588 0.00345534 -0.0129603)
      PathPoint P5: skull (0.0104662 0.017045 -0.00384473)
    Millard2012EquilibriumMuscle long_col_c1thx: max_isometric_force=28.728 optimal_fiber_length=0.09614302
        tendon_slack_length=0.09440526 pennation_angle_at_optimal=0.08726646 minimum_activation=0.01
      PathPoint P1: spine (-0.0486216 0.301736 0.00368044)
      PathPoint P2: cerv7 (0.025943 0.00123006 0.00447293)
      PathPoint P3: cerv6 (0.0258759 0.00258312 0.0044953)
      PathPoint P4: cerv5 (0.0249142 0.00254957 0.00436111)
      PathPoint P5: cerv4 (0.0246571 0.00370135 0.00423811)
      PathPoint P6: cerv3 (0.0247353 0.00674295 0.0041151)
      PathPoint P7: cerv2 (0.0237289 0.0108804 0.00398091)
      PathPoint P8: cerv1 (0.0651371 0.00538989 0.00346652)
    Millard2012EquilibriumMuscle long_col_c1thx_L: max_isometric_force=28.728 optimal_fiber_length=0.09614302
        tendon_slack_length=0.09440526 pennation_angle_at_optimal=0.08726646 minimum_activation=0.01
      PathPoint P1: spine (-0.0486216 0.301736 -0.00368044)
      PathPoint P2: cerv7 (0.025943 0.00123006 -0.00447293)
      PathPoint P3: cerv6 (0.0258759 0.00258312 -0.0044953)
      PathPoint P4: cerv5 (0.0249142 0.00254957 -0.00436111)
      PathPoint P5: cerv4 (0.0246571 0.00370135 -0.00423811)
      PathPoint P6: cerv3 (0.0247353 0.00674295 -0.0041151)
      PathPoint P7: cerv2 (0.0237289 0.0108804 -0.00398091)
      PathPoint P8: cerv1 (0.0651371 0.00538989 -0.00346652)
    Millard2012EquilibriumMuscle long_col_c1c5: max_isometric_force=28.728 optimal_fiber_length=0.04016695
        tendon_slack_length=0.03940543 pennation_angle_at_optimal=0.08726646 minimum_activation=0.01
      PathPoint P1: cerv5 (0.00748098 0.0099411 0.026614)
      PathPoint P2: cerv4 (0.0125354 0.00837557 0.0231474)
      PathPoint P3: cerv2 (0.0194461 0.00177799 0.0152639)
      PathPoint P4: cerv1 (0.0640189 0.00538989 0.00693305)
    Millard2012EquilibriumMuscle long_col_c1c5_L: max_isometric_force=28.728 optimal_fiber_length=0.04016695
        tendon_slack_length=0.03940543 pennation_angle_at_optimal=0.08726646 minimum_activation=0.01
      PathPoint P1: cerv5 (0.00748098 0.0099411 -0.026614)
      PathPoint P2: cerv4 (0.0125354 0.00837557 -0.0231474)
      PathPoint P3: cerv2 (0.0194461 0.00177799 -0.0152639)
      PathPoint P4: cerv1 (0.0640189 0.00538989 -0.00693305)
    Millard2012EquilibriumMuscle long_col_c5thx: max_isometric_force=28.728 optimal_fiber_length=0.06069313
        tendon_slack_length=0.0577565 pennation_angle_at_optimal=0.08726646 minimum_activation=0.01
      PathPoint P1: spine (-0.0495467 0.301358 0.00676405)
      PathPoint P2: spine (-0.0479949 0.318577 0.010166)
      PathPoint P3: spine (-0.0454186 0.332861 0.0132993)
      PathPoint P4: spine (-0.0444239 0.341783 0.0150003)
      PathPoint P5: spine (-0.0421659 0.355938 0.017686)
      PathPoint P6: cerv7 (0.0124236 0.00817429 0.0221298)
      PathPoint P7: cerv6 (0.0107462 0.00797301 0.0247801)
      PathPoint P8: cerv5 (0.00748098 0.0099411 0.026614)
    Millard2012EquilibriumMuscle long_col_c5thx_L: max_isometric_force=28.728 optimal_fiber_length=0.06037391
        tendon_slack_length=0.05745273 pennation_angle_at_optimal=0.08726646 minimum_activation=0.01
      PathPoint P1: spine (-0.0495467 0.301358 -0.00676405)
      PathPoint P2: spine (-0.0479949 0.318577 -0.010166)
      PathPoint P3: spine (-0.0454186 0.332861 -0.01337)
      PathPoint P4: spine (-0.0444239 0.341783 -0.0150003)
      PathPoint P5: spine (-0.0421659 0.355938 -0.017686)
      PathPoint P6: cerv7 (0.0124236 0.00817429 -0.0221298)
      PathPoint P7: cerv6 (0.0107462 0.00797301 -0.0247801)
      PathPoint P8: cerv5 (0.00748098 0.0099411 -0.026614)
    Millard2012EquilibriumMuscle trap_cl: max_isometric_force=108.64 optimal_fiber_length=0.08965751
        tendon_slack_length=0.1272518 pennation_angle_at_optimal=0.5235988 minimum_activation=0.01
      PathPoint P1: rclavicle (-0.0292446 0.0230773 0.0864406)
      PathPoint P2: skull (-0.0857694 0.0278102 0.01414)
    Millard2012EquilibriumMuscle trap_cl_L: max_isometric_force=108.64 optimal_fiber_length=0.08965751
        tendon_slack_length=0.1272518 pennation_angle_at_optimal=0.5235988 minimum_activation=0.01
      PathPoint P1: lclavicle (-0.0292446 0.0230773 -0.0864406)
      PathPoint P2: skull (-0.0857694 0.0278102 -0.01414)
    Millard2012EquilibriumMuscle trap_acr: max_isometric_force=527.73 optimal_fiber_length=0.0925447
        tendon_slack_length=0.07703541 pennation_angle_at_optimal=0 minimum_activation=0.01
      PathPoint P1: rscapula (-0.0236642 -0.00911157 -0.00732109)
      PathPoint P2: cerv7 (-0.0533397 0.0212464 0.00341061)
    Millard2012EquilibriumMuscle trap_acr_L: max_isometric_force=527.73 optimal_fiber_length=0.0925447
        tendon_slack_length=0.07703541 pennation_angle_at_optimal=0 minimum_activation=0.01
      PathPoint P1: lscapula (-0.0236642 -0.00911157 0.00732109)
      PathPoint P2: cerv7 (-0.0533397 0.0212464 -0.00341061)
    Millard2012EquilibriumMuscle splen_cap_sklc6: max_isometric_force=69.314 optimal_fiber_length=0.1049427
        tendon_slack_length=0.02873553 pennation_angle_at_optimal=0 minimum_activation=0.01
      PathPoint P1: cerv6 (-0.0543462 0.0184173 0.00341061)
      PathPoint P2: skull (-0.0658303 0.0204838 0.0469911)
    Millard2012EquilibriumMuscle splen_cap_sklc6_L: max_isometric_force=69.314 optimal_fiber_length=0.1049427
        tendon_slack_length=0.02873553 pennation_angle_at_optimal=0 minimum_activation=0.01
      PathPoint P1: cerv6 (-0.0543462 0.0184173 -0.00341061)
      PathPoint P2: skull (-0.0658303 0.0204838 -0.0469911)
    Millard2012EquilibriumMuscle splen_cap_sklthx: max_isometric_force=69.314 optimal_fiber_length=0.1035907
        tendon_slack_length=0.0892636 pennation_angle_at_optimal=0 minimum_activation=0.01
      PathPoint P1: spine (-0.103291 0.337228 0.00298414)
      PathPoint P2: skull (-0.0428901 0.0117478 0.0579165)
    Millard2012EquilibriumMuscle splen_cap_sklthx_L: max_isometric_force=69.314 optimal_fiber_length=0.1035907
        tendon_slack_length=0.0892636 pennation_angle_at_optimal=0 minimum_activation=0.01
      PathPoint P1: spine (-0.103291 0.337228 -0.00298414)
      PathPoint P2: skull (-0.0428901 0.0117478 -0.0579165)
    Millard2012EquilibriumMuscle splen_cerv_c3thx: max_isometric_force=69.314 optimal_fiber_length=0.09913598
        tendon_slack_length=0.113159 pennation_angle_at_optimal=0 minimum_activation=0.01
      PathPoint P1: spine (-0.127801 0.260834 0.00407832)
      PathPoint P2: cerv3 (-0.0088005 0.0112382 0.0264462)
    Millard2012EquilibriumMuscle splen_cerv_c3thx_L: max_isometric_force=69.314 optimal_fiber_length=0.09913598
        tendon_slack_length=0.113159 pennation_angle_at_optimal=0 minimum_activation=0.01
      PathPoint P1: spine (-0.127801 0.260834 -0.00407832)
      PathPoint P2: cerv3 (-0.0088005 0.0112382 -0.0264462)
    Millard2012EquilibriumMuscle semi_cap_sklc5: max_isometric_force=89.67 optimal_fiber_length=0.074356
        tendon_slack_length=0.05091418 pennation_angle_at_optimal=0.08726646 minimum_activation=0.01
      PathPoint P1: cerv5 (-0.0104108 0.0129044 0.0262785)
      PathPoint P2: skull (-0.0794684 0.0213596 0.0192236)
    Millard2012EquilibriumMuscle semi_cap_sklc5_L: max_isometric_force=89.67 optimal_fiber_length=0.074356
        tendon_slack_length=0.05091418 pennation_angle_at_optimal=0.08726646 minimum_activation=0.01
      PathPoint P1: cerv5 (-0.0104108 0.0129044 -0.0262785)
      PathPoint P2: skull (-0.0794684 0.0213596 -0.0192236)
    Millard2012EquilibriumMuscle semi_cap_sklthx: max_isometric_force=89.67 optimal_fiber_length=0.07628553
        tendon_slack_length=0.07728398 pennation_angle_at_optimal=0.08726646 minimum_activation=0.01
      PathPoint P1: spine (-0.0849386 0.375325 0.0345165)
      PathPoint P2: skull (-0.0819247 0.0213596 0.0118546)
    Millard2012EquilibriumMuscle semi_cap_sklthx_L: max_isometric_force=89.67 optimal_fiber_length=0.07628553
        tendon_slack_length=0.07728398 pennation_angle_at_optimal=0.08726646 minimum_activation=0.01
      PathPoint P1: spine (-0.0849386 0.375325 -0.0345165)
      PathPoint P2: skull (-0.0819247 0.0213596 -0.0118546)
    Millard2012EquilibriumMuscle semi_cerv_c3thx: max_isometric_force=89.67 optimal_fiber_length=0.07404731
        tendon_slack_length=0.0298084 pennation_angle_at_optimal=0.08726646 minimum_activation=0.01
      PathPoint P1: spine (-0.0884897 0.34812 0.0259322)
      PathPoint P2: cerv3 (-0.045445 -0.00360071 0.00268376)
    Millard2012EquilibriumMuscle semi_cerv_c3thx_L: max_isometric_force=89.67 optimal_fiber_length=0.07404731
        tendon_slack_length=0.0298084 pennation_angle_at_optimal=0.08726646 minimum_activation=0.01
      PathPoint P1: spine (-0.0884897 0.34812 -0.0259322)
      PathPoint P2: cerv3 (-0.045445 -0.00360071 -0.00268376)
    Millard2012EquilibriumMuscle levator_scap: max_isometric_force=106.82 optimal_fiber_length=0.1199565
        tendon_slack_length=0.02322167 pennation_angle_at_optimal=0 minimum_activation=0.01
      PathPoint P1: rscapula (-0.0969746 -0.0360484 -0.0810293)
      PathPoint P2: cerv2 (-0.0132623 0.00810719 0.0237177)
    Millard2012EquilibriumMuscle levator_scap_L: max_isometric_force=106.82 optimal_fiber_length=0.1199565
        tendon_slack_length=0.02322167 pennation_angle_at_optimal=0 minimum_activation=0.01
      PathPoint P1: lscapula (-0.0969746 -0.0360484 0.0810293)
      PathPoint P2: cerv2 (-0.0132623 0.00810719 -0.0237177)
    Millard2012EquilibriumMuscle longissi_cap_sklc6: max_isometric_force=43.652 optimal_fiber_length=0.07948719
        tendon_slack_length=0.0264913 pennation_angle_at_optimal=0 minimum_activation=0.01
      PathPoint P1: cerv6 (-0.00913597 0.0169412 0.0308521)
      PathPoint P2: skull (-0.0367385 0.0054467 0.0587389)
    Millard2012EquilibriumMuscle longissi_cap_sklc6_L: max_isometric_force=43.652 optimal_fiber_length=0.07948719
        tendon_slack_length=0.0264913 pennation_angle_at_optimal=0 minimum_activation=0.01
      PathPoint P1: cerv6 (-0.00913597 0.0169412 -0.0308521)
      PathPoint P2: skull (-0.0367385 0.0054467 -0.0587389)
    Millard2012EquilibriumMuscle longissi_cerv_c4thx: max_isometric_force=28.07 optimal_fiber_length=0.1371025
        tendon_slack_length=0.04402763 pennation_angle_at_optimal=0 minimum_activation=0.01
      PathPoint P1: spine (-0.109359 0.274402 0.03198)
      PathPoint P2: spine (-0.108603 0.300781 0.0302492)
      PathPoint P3: spine (-0.0992525 0.325192 0.0290357)
      PathPoint P4: spine (-0.0808702 0.371028 0.0277525)
      PathPoint P5: cerv4 (-0.00792828 0.012938 0.0291859)
    Millard2012EquilibriumMuscle longissi_cerv_c4thx_L: max_isometric_force=28.07 optimal_fiber_length=0.1371025
        tendon_slack_length=0.04402763 pennation_angle_at_optimal=0 minimum_activation=0.01
      PathPoint P1: spine (-0.109359 0.274402 -0.03198)
      PathPoint P2: spine (-0.108603 0.300781 -0.0302492)
      PathPoint P3: spine (-0.0992525 0.325192 -0.0290357)
      PathPoint P4: spine (-0.0808702 0.371028 -0.0277525)
      PathPoint P5: cerv4 (-0.00792828 0.012938 -0.0291859)
    Millard2012EquilibriumMuscle iliocost_cerv_c5rib: max_isometric_force=28.07 optimal_fiber_length=0.08349574
        tendon_slack_length=0.02653244 pennation_angle_at_optimal=0 minimum_activation=0.01
      PathPoint P1: spine (-0.102943 0.326236 0.0530182)
      PathPoint P2: spine (-0.0832973 0.37439 0.0401367)
      PathPoint P3: cerv5 (-0.0105114 0.0140674 0.0290741)
    Millard2012EquilibriumMuscle iliocost_cerv_c5rib_L: max_isometric_force=28.07 optimal_fiber_length=0.08349574
        tendon_slack_length=0.02653244 pennation_angle_at_optimal=0 minimum_activation=0.01
      PathPoint P1: spine (-0.102943 0.326236 -0.0530182)
      PathPoint P2: spine (-0.0832973 0.37439 -0.0401367)
      PathPoint P3: cerv5 (-0.0105114 0.0140674 -0.0290741)
    Millard2012EquilibriumMuscle rectcap_post_maj: max_isometric_force=45.668 optimal_fiber_length=0.04025088
        tendon_slack_length=0.02483806 pennation_angle_at_optimal=0.08726646 minimum_activation=0.01
      PathPoint P1: cerv2 (-0.0406702 -0.00723497 0.00268376)
      PathPoint P2: skull (-0.064506 0.00961182 0.0245635)
    Millard2012EquilibriumMuscle rectcap_post_maj_L: max_isometric_force=45.668 optimal_fiber_length=0.04025088
        tendon_slack_length=0.02483806 pennation_angle_at_optimal=0.08726646 minimum_activation=0.01
      PathPoint P1: cerv2 (-0.0406702 -0.00723497 -0.00268376)
      PathPoint P2: skull (-0.064506 0.00961182 -0.0245635)
    Millard2012EquilibriumMuscle rectcap_post_min: max_isometric_force=25.088 optimal_fiber_length=0.01970769
        tendon_slack_length=0.01752636 pennation_angle_at_optimal=0.08726646 minimum_activation=0.01
      PathPoint P1: cerv1 (7.82764e-5 0.00100641 0.00682123)
      PathPoint P2: skull (-0.0712342 0.00961182 0.0154857)
    Millard2012EquilibriumMuscle rectcap_post_min_L: max_isometric_force=25.088 optimal_fiber_length=0.01970769
        tendon_slack_length=0.01752636 pennation_angle_at_optimal=0.08726646 minimum_activation=0.01
      PathPoint P1: cerv1 (7.82764e-5 0.00100641 -0.00682123)
      PathPoint P2: skull (-0.0712342 0.00961182 -0.0154857)
    Millard2012EquilibriumMuscle obl_cap_sup: max_isometric_force=51.107 optimal_fiber_length=0.02676693
        tendon_slack_length=0.02186001 pennation_angle_at_optimal=0.1745329 minimum_activation=0.01
      PathPoint P1: cerv1 (0.0391941 0.0043052 0.0469658)
      PathPoint P2: skull (-0.0508145 0.00994289 0.0407755)
    Millard2012EquilibriumMuscle obl_cap_sup_L: max_isometric_force=51.107 optimal_fiber_length=0.02676693
        tendon_slack_length=0.02186001 pennation_angle_at_optimal=0.1745329 minimum_activation=0.01
      PathPoint P1: cerv1 (0.0391941 0.0043052 -0.0469658)
      PathPoint P2: skull (-0.0508145 0.00994289 -0.0407755)
    Millard2012EquilibriumMuscle obl_cap_inf: max_isometric_force=63.406 optimal_fiber_length=0.04249288
        tendon_slack_length=0.01745227 pennation_angle_at_optimal=0 minimum_activation=0.01
      PathPoint P1: cerv2 (-0.0406702 -0.00723497 0.00611674)
      PathPoint P2: cerv1 (0.0335023 0.00390264 0.0423922)
    Millard2012EquilibriumMuscle obl_cap_inf_L: max_isometric_force=63.406 optimal_fiber_length=0.04249288
        tendon_slack_length=0.01745227 pennation_angle_at_optimal=0 minimum_activation=0.01
      PathPoint P1: cerv2 (-0.0406702 -0.00723497 -0.00611674)
      PathPoint P2: cerv1 (0.0335023 0.00390264 -0.0423922)
    BushingForce [values shared by the 8 below unless stated]: location_body_1=(0 0 0) orientation_body_1=(0 0 0)
        location_body_2=(0 0 0) orientation_body_2=(0 0 0) translational_stiffness=(0 0 0) [N/m]
        translational_damping=(0 0 0) [N/(m/s)]
    BushingForce Spine_C7_Bushing: body_1=spine body_2=cerv7 rotational_stiffness=(27.5 13.75 27.5) [Nm/rad]
        rotational_damping=(2.75 1.375 2.75) [Nm/(rad/s)]
    BushingForce C7_C6_Bushing: body_1=cerv7 body_2=cerv6 rotational_stiffness=(27.5 13.75 27.5)
        rotational_damping=(2.75 1.375 2.75)
    BushingForce C6_C5_Bushing: body_1=cerv6 body_2=cerv5 rotational_stiffness=(27.5 13.75 27.5)
        rotational_damping=(2.75 1.375 2.75)
    BushingForce C5_C4_Bushing: body_1=cerv5 body_2=cerv4 rotational_stiffness=(23.2 11.6 23.2)
        rotational_damping=(2.32 1.16 2.32)
    BushingForce C4_C3_Bushing: body_1=cerv4 body_2=cerv3 rotational_stiffness=(23.2 11.6 23.2)
        rotational_damping=(2.32 1.16 2.32)
    BushingForce C3_C2_Bushing: body_1=cerv3 body_2=cerv2 rotational_stiffness=(7.8 3.9 7.8)
        rotational_damping=(0.78 0.39 0.78)
    BushingForce C2_C1_Bushing: body_1=cerv2 body_2=cerv1 rotational_stiffness=(7.8 3.9 7.8)
        rotational_damping=(0.78 0.39 0.78)
    BushingForce C1_skull_Bushing: body_1=cerv1 body_2=skull rotational_stiffness=(7.8 3.9 7.8)
        rotational_damping=(0.78 0.39 0.78)
    ObjectGroup hyoid: members=(Sterno_hyoid Omo_hyoid SternoThyroid digastric_post digastric_ant Geniohyoid Mylohyoid_Post Mylohyoid_Ant Stylohyoid_Lat Stylohyoid_Med Sterno_hyoid_L Omo_hyoid_L SternoThyroid_L digastric_post_L digastric_ant_L Geniohyoid_L Mylohyoid_Post_L Mylohyoid_Ant_L Stylohyoid_Lat_L Stylohyoid_Med_L)
    ObjectGroup sterno: members=(cleid_mast cleid_occ stern_mast cleid_mast_L cleid_occ_L stern_mast_L)
    ObjectGroup flexion: members=(cleid_mast cleid_occ long_cap_sklc4 long_col_c1c5 long_col_c1thx long_col_c5thx scalenus_ant stern_mast cleid_mast_L cleid_occ_L long_cap_sklc4_L long_col_c1c5_L long_col_c1thx_L long_col_c5thx_L scalenus_ant_L stern_mast_L)
    ObjectGroup rotation_contra: members=(cleid_mast cleid_occ long_cap_sklc4 long_col_c1c5 obl_cap_sup semi_cap_sklc5 semi_cap_sklthx semi_cerv_c3thx stern_mast trap_acr trap_cl)
    ObjectGroup lat_bending: members=(cleid_mast cleid_occ iliocost_cerv_c5rib levator_scap long_cap_sklc4 long_col_c1c5 long_col_c1thx long_col_c5thx longissi_cap_sklc6 longissi_cerv_c4thx obl_cap_inf obl_cap_sup rectcap_post_maj scalenus_ant scalenus_med scalenus_post semi_cap_sklc5 semi_cap_sklthx semi_cerv_c3thx splen_cap_sklc6 splen_cap_sklthx splen_cerv_c3thx stern_mast trap_acr trap_cl)
    ObjectGroup scalenus: members=(scalenus_ant scalenus_med scalenus_post)
    ObjectGroup extension: members=(iliocost_cerv_c5rib levator_scap longissi_cap_sklc6 longissi_cerv_c4thx obl_cap_inf obl_cap_sup rectcap_post_maj rectcap_post_min scalenus_med scalenus_post semi_cap_sklc5 semi_cap_sklthx semi_cerv_c3thx splen_cap_sklc6 splen_cap_sklthx splen_cerv_c3thx trap_acr trap_cl)
    ObjectGroup rotation_ipsi: members=(iliocost_cerv_c5rib levator_scap long_col_c5thx longissi_cap_sklc6 longissi_cerv_c4thx obl_cap_inf rectcap_post_maj scalenus_med scalenus_post splen_cap_sklc6 splen_cap_sklthx splen_cerv_c3thx)
    ObjectGroup longus: members=(long_cap_sklc4 long_col_c1c5 long_col_c1thx long_col_c5thx)
    ObjectGroup trapezius: members=(trap_acr trap_cl)
    ObjectGroup splenius: members=(splen_cap_sklc6 splen_cap_sklthx splen_cerv_c3thx)
    ObjectGroup semispinalis: members=(semi_cap_sklc5 semi_cap_sklthx semi_cerv_c3thx)
    ObjectGroup levator_scap: members=levator_scap
    ObjectGroup erectorspinae: members=(iliocost_cerv_c5rib longissi_cap_sklc6 longissi_cerv_c4thx)
    ObjectGroup suboccipital: members=(obl_cap_inf obl_cap_sup rectcap_post_maj rectcap_post_min)
    ObjectGroup multifidus
  MarkerSet:
    Marker SJN: ribcage (0.0349527 0.351733 0.00116715)
    Marker RAH: skull (0.0921488 0.121102 0.0551853)
    Marker LAH: skull (0.0904674 0.121775 -0.0622779)
    Marker RPH: skull (-0.0737183 0.114947 0.0521823)
    Marker LPH: skull (-0.0754062 0.11033 -0.0554926)
    Marker RCAJ: rscapula (-0.00656222 -0.0121886 0.0270216)
    Marker LCAJ: lscapula (-0.00999533 -0.0130474 -0.0277959)
